// SBML level 2 version 1

model p53Model()
  // p53

  // Compartments:
  compartment Cell = 1;

  // Species:
  substanceOnly species p53 in Cell = 70;
  substanceOnly species pMDM2 in Cell = 30;
  substanceOnly species MDM2 in Cell = 60;

  // Parameters:
  k1 = 1;
  k2 = 1;
  k3 = 1;
  k4 = 1;
  k5 = 1;
  k6 = 1;
  k7 = 1;

  // Reactions:
  p53Transcription: EmptySet => p53; k1;
  p53DegradationInd: p53 => EmptySet; k2*p53;
  p53DegradationByMDM2: p53 => EmptySet; k3*(p53*MDM2/(p53 + k7));  // modifiers: MDM2
  pMDM2Production: EmptySet => pMDM2; k4*p53;  // modifiers: p53
  pMDM2toMDM2: pMDM2 => MDM2; k5*pMDM2;
  MDM2Degradation: MDM2 => EmptySet; k6*MDM2;

  // Unit definitions:
  unit substance = item;
end
